# OpenSim document version 40500
MarkerSet:
  Marker RACR: torso (-0.003 0.425 0.13)
  Marker LACR: torso (-0.001720916 0.4143524 -0.1310885)
  Marker C7: torso (-0.085 0.435 0.00165426)
  Marker CLAV: torso (0.09241042 0.2827401 -0.002032731)
  Marker RPSH: torso (-0.05 0.3715 0.17)
  Marker LPSH: torso (-0.1009549 0.2968683 0.0002406089)
  Marker RSJC: humerus_r (0 0 0)
  Marker RUA1: humerus_r (0.001320072 -0.06527744 0.01951857)
  Marker RLEL: humerus_r (0.015 -0.28 0.04)
  Marker RFAsuperior: ulna_r (0.00460453 -0.0800579 0.0453196)
  Marker RFAradius: radius_r (0.0005 -0.225 0.05)
  Marker LSJC: humerus_l (0 0 0)
  Marker LUA1: humerus_l (0.001741372 -0.0655633 -0.02342839)
  Marker LLEL: humerus_l (0.015 -0.28 -0.04)
  Marker LFAsuperior: ulna_l (0.00460453 -0.0800579 -0.0453196)
  Marker LFAradius: radius_l (0.0005 -0.225 -0.05)
  Marker RASI: pelvis (0.00953047 0.0180816 0.128464)
  Marker LASI: pelvis (0.00953047 0.0180816 -0.128464)
  Marker RPSI: pelvis (-0.155 0.035 0.045)
  Marker LPSI: pelvis (-0.155 0.035 -0.045)
  Marker LHJC: femur_l (0 0 0)
  Marker RHJC: femur_r (0 0 0)
  Marker RTH1: femur_r (0.0322877 -0.1834343 0.06967795)
  Marker RLFC: femur_r (0 -0.404 0.05)
  Marker RTB3: tibia_r (0.01247958 -0.2976742 0.04574949)
  Marker RLMAL: tibia_r (-0.005 -0.3888 0.053)
  Marker RAJC: talus_r (0 0 0)
  Marker RCAL: calcn_r (-0.025 0.02 -0.005)
  Marker RTOE: calcn_r (0.1986915 0.03122964 0.0009034154)
  Marker LTH3: femur_l (0.009372213 -0.2735176 -0.06142012)
  Marker LLFC: femur_l (0 -0.404 -0.05)
  Marker LTB3: tibia_l (0.01584636 -0.2475017 -0.03601984)
  Marker LLMAL: tibia_l (-0.005 -0.3888 -0.053)
  Marker LAJC: talus_l (0 0 0)
  Marker LCAL: calcn_l (-0.025 0.02 0.005)
  Marker LTOE: calcn_l (0.2116317 0.03587006 -4.296708e-5)
  Marker NewMarker_43: ground (-0.03716377 1.355475 -0.0004089105)
  Marker NewMarker_44: ground (-0.2044769 1.351197 0.06520514)
